# OpenSim document version 30000
InverseKinematicsTool:
  results_directory: ./
  constraint_weight: Inf
  accuracy: 1e-5
  time_range: -1 -1
  report_errors: true
  report_marker_locations: false
  IKTaskSet:
    IKMarkerTask LKneeMedial: apply=true weight=1
    IKMarkerTask RAnkleMedial: apply=true weight=1
    IKMarkerTask RMT2: apply=true weight=1
    IKMarkerTask RMT5: apply=true weight=1
    IKMarkerTask RKneeLateral: apply=true weight=1
    IKMarkerTask LASIS: apply=true weight=1
    IKMarkerTask LMidShank: apply=true weight=1
    IKMarkerTask RMidShank: apply=true weight=1
    IKMarkerTask RToe: apply=true weight=1
    IKMarkerTask LMT2: apply=true weight=1
    IKMarkerTask LMT5: apply=true weight=1
    IKMarkerTask RHeel: apply=true weight=1
    IKMarkerTask Sternum: apply=true weight=1
    IKMarkerTask LAnkleLateral: apply=true weight=1
    IKMarkerTask RKneeMedial: apply=true weight=1
    IKMarkerTask RASIS: apply=true weight=1
    IKMarkerTask LToe: apply=true weight=1
    IKMarkerTask LFibulaHead: apply=true weight=1
    IKMarkerTask LShoulder: apply=true weight=1
    IKMarkerTask RFibulaHead: apply=true weight=1
    IKMarkerTask RPSIS: apply=true weight=1
    IKMarkerTask RShoulder: apply=true weight=1
    IKMarkerTask LKneeLateral: apply=true weight=1
    IKMarkerTask RAnkleLateral: apply=true weight=1
    IKMarkerTask LPSIS: apply=true weight=1
    IKMarkerTask LHeel: apply=true weight=1
    IKMarkerTask LAnkleMedial: apply=true weight=1
